<?xml version="1.0" encoding="UTF-8"?>
<neuroml xmlns="http://www.neuroml.org/schema/neuroml2" xmlns:xsi="http://www.w3.org/2001/XMLSchema-instance" xsi:schemaLocation="http://www.neuroml.org/schema/neuroml2  https://raw.github.com/NeuroML/NeuroML2/development/Schemas/NeuroML2/NeuroML_v2beta3.xsd" id="network_PyloricPacemakerNetwork">

    <notes>

Network structure (NeuroML 2beta3) for project: PyloricPacemakerNetwork saved with neuroConstruct v1.7.1 on: 14:00:32, 17-Mar-14

Cell Group: AB_PD contains 1 cells
Cell Group: PY contains 1 cells
Cell Group: LP contains 1 cells

Network connection: PD_LP contains 1 individual synaptic connections
Network connection: PY_LP contains 1 individual synaptic connections
Network connection: AB_PY contains 1 individual synaptic connections
Network connection: AB_LP contains 1 individual synaptic connections
Network connection: LP_PY contains 1 individual synaptic connections
Network connection: LP_ABPD contains 1 individual synaptic connections
Network connection: PD_PY contains 1 individual synaptic connections

    </notes>

    <include href="CaPool_STG.nml"/>
    <include href="CaS_STG.channel.nml"/>
    <include href="CaT_STG.channel.nml"/>
    <include href="H_STG.channel.nml"/>
    <include href="KA_STG.channel.nml"/>
    <include href="KCa_STG.channel.nml"/>
    <include href="Kd_STG.channel.nml"/>
    <include href="LeakConductance.channel.nml"/>
    <include href="Na_STG.channel.nml"/>

    <include href="Synapses.nml"/>

    <pulseGenerator id="pulseGen0" delay="0s" duration="0.1s" amplitude="-0.2nA"/>
    <pulseGenerator id="pulseGen1" delay="0s" duration="1s" amplitude="-0.03nA"/>
    <pulseGenerator id="pulseGen2" delay="4s" duration="1s" amplitude="-0.2nA"/>

    <network id="network_PyloricPacemakerNetwork" type="networkWithTemperature" temperature="10.0 degC">

        <population id="AB_PD" component="AB_PD" size="1" />
        <population id="LP" component="LP" size="1" />
<!--
        <population id="AB_PD" component="AB_PD" type="populationList" size="1">
            <instance id="0">
                <location x="0.0" y="519.615" z="0.0"/>
            </instance>
        </population>

        <population id="LP" component="LP" type="populationList" size="1">
            <instance id="0">
                <location x="-300.0" y="0.0" z="0.0"/>
            </instance>
        </population>-->

        <continuousProjection id ="proj1" presynapticPopulation="AB_PD" postsynapticPopulation="LP">
            <continuousConnection id="0" preCell="0" postCell="0" preComponent="silent" postComponent="Glu_3nS"/>
        </continuousProjection>

        <explicitInput target="AB_PD[0]" input="pulseGen0"/>
        <explicitInput target="AB_PD[0]" input="pulseGen1"/>
        <explicitInput target="AB_PD[0]" input="pulseGen2"/>

    </network>

</neuroml>
