<Lems xmlns="http://www.neuroml.org/lems/0.7.2"
      xmlns:xsi="http://www.w3.org/2001/XMLSchema-instance"
      xsi:schemaLocation="http://www.neuroml.org/lems/0.7.2  https://raw.github.com/LEMS/LEMS/development/Schemas/LEMS/LEMS_v0.7.2.xsd">

    <Target component="sim1" reportFile="simulator.props" timesFile="time.dat"/>

        <!--Include standard NeuroML 2 ComponentType definitions-->

    <Include file="Cells.xml"/>
    <Include file="Networks.xml"/>
    <Include file="Simulation.xml"/>

    <!--Include the generated NeuroML 2 files-->

    <Include file="Fig2c.net.nml"/>

        <!--Note: this could be: Simulation id="sim1" ... , but Component type="Simulation" ...
        is used to allow validation of this file according to the LEMS schema specified above...-->
    <Component type="Simulation" id="sim1" length="5000.0ms" step="0.025ms" target="network_PyloricPacemakerNetwork">

        <Display id="AB_PD_v" title="AB_PD, VOLTAGE" xmin="-100.0" xmax="5100.0" ymin="-104.0" ymax="64.0" timeScale="1ms">
            <Line id="AB_PD" timeScale="1ms" quantity="AB_PD[0]/v" scale="1 mV" color="#000000"/>
        </Display>

        <Display id="GraphWin_14" title="PyloricPacemakerNetwork: Default Simulation Configuration, PY, VOLTAGE" xmin="-100.0" xmax="5100.0" ymin="-104.0" ymax="64.0" timeScale="1ms">
            <Line id="PY 0nS" timeScale="1ms" quantity="PY[0]/v" scale="1 mV" color="#000000"/>
            <Line id="PY 3nS" timeScale="1ms" quantity="PY[1]/v" scale="1 mV" color="#ff0000"/>
            <Line id="PY 10nS" timeScale="1ms" quantity="PY[2]/v" scale="1 mV" color="#00ff00"/>
            <Line id="PY 30nS" timeScale="1ms" quantity="PY[3]/v" scale="1 mV" color="#0000ff"/>
            <Line id="PY 100nS" timeScale="1ms" quantity="PY[4]/v" scale="1 mV" color="#00ffff"/>
        </Display>

        <OutputFile id="AB_PD_v_OF" fileName="AB_PD_Fig2b.dat">
            <OutputColumn id="v" quantity="AB_PD[0]/v"/>
        </OutputFile>

        <OutputFile id="PY_v_OF" fileName="PY_Fig2c.dat">
            <OutputColumn id="v" quantity="PY[0]/v"/>
            <OutputColumn id="v" quantity="PY[1]/v"/>
            <OutputColumn id="v" quantity="PY[2]/v"/>
            <OutputColumn id="v" quantity="PY[3]/v"/>
            <OutputColumn id="v" quantity="PY[4]/v"/>
        </OutputFile>

    </Component>

</Lems>
