<?xml version="1.0" encoding="UTF-8"?>
<channelml xmlns="http://morphml.org/channelml/schema" xmlns:xsi="http://www.w3.org/2001/XMLSchema-instance"
xmlns:meta="http://morphml.org/metadata/schema"
xsi:schemaLocation="http://morphml.org/channelml/schema  ../../Schemata/v1.6/Level2/ChannelML_v1.6.xsd" units="Physiological Units">

    <meta:notes>ChannelML file containing a single Channel description</meta:notes>

    <ion name="h" default_erev="-50.0" charge="1"/>      <!-- phys units: mV -->

    <channel_type name="H" density="yes">

        <meta:notes>Prinz et al. (2003) H current</meta:notes>

        <meta:neuronDBref>
            <meta:modelName>K channels</meta:modelName>
            <meta:uri>http://senselab.med.yale.edu/senselab/NeuronDB/channelGene2.htm#table3</meta:uri>
        </meta:neuronDBref>

        <current_voltage_relation>
            <ohmic ion="h">
                <conductance default_gmax="0.05">      <!-- phys units: mS/cm2-->

                    <gate power="1">
                        <state name="m" fraction="1"/>
                    </gate>
                </conductance>
            </ohmic>
        </current_voltage_relation>

        <hh_gate state="m">
            <transition>
                <voltage_gate>
                     <tau>
                         <generic_equation_hh expr="2/( exp((v+169.7)/-11.6) + exp((v-26.7)/14.3) )"/>
                     </tau>
                     <inf>
                         <parameterised_hh type="sigmoid">      <!-- Form of equation: A / (1 + exp(k*(v-d))) -->

                             <parameter name="A" value="1"/>
                             <parameter name="k" value="0.18181818"/>
                             <parameter name="d" value="-75"/>
                         </parameterised_hh>
                    </inf>
                </voltage_gate>
            </transition>
        </hh_gate>

        <impl_prefs>
            <table_settings max_v="100" min_v="-100" table_divisions="400"/>
        </impl_prefs>

    </channel_type>
</channelml>
