<?xml version="1.0" encoding="UTF-8"?>
<channelml xmlns="http://morphml.org/channelml/schema"
xmlns:xsi="http://www.w3.org/2001/XMLSchema-instance" xmlns:meta="http://morphml.org/metadata/schema"
xsi:schemaLocation="http://morphml.org/channelml/schema  ../../Schemata/v1.6/Level2/ChannelML_v1.6.xsd" units="Physiological Units">

    <meta:notes>ChannelML file containing a single Channel description</meta:notes>

    <ion name="k" default_erev="-80.0" charge="1"/>          <!-- phys units: mV -->

    <channel_type name="KA" density="yes">

        <meta:notes>Prinz et al. (2003) KA conductance</meta:notes>

        <current_voltage_relation>
            <ohmic ion="k">
                <conductance default_gmax="50">          <!-- phys units: mS/cm2-->

                    <gate power="3">
                         <state name="m" fraction="1"/>
                     </gate>
                     <gate power="1">
                         <state name="h" fraction="1"/>
                    </gate>
                </conductance>
            </ohmic>
        </current_voltage_relation>

        <hh_gate state="m">
            <transition>
                <voltage_gate>
                    <tau>
                        <generic_equation_hh expr="23.2 - (20.8 / (1 + exp ((v + 32.9) / (-15.2))))"/>
                    </tau>
                    <inf>
                        <parameterised_hh type="sigmoid">          <!-- Form of equation: A / (1 + exp(k*(v-d))) -->

                            <parameter name="A" value="1"/>
                            <parameter name="k" value="-0.1149425"/>
                            <parameter name="d" value="-27.2"/>
                        </parameterised_hh>
                    </inf>
                </voltage_gate>
            </transition>
        </hh_gate>

        <hh_gate state="h">
            <transition>
                <voltage_gate>
                    <tau>
                        <generic_equation_hh expr="77.2 - (58.4 / (1 + exp ((v + 38.9) / (-26.5))))"/>
                    </tau>
                    <inf>
                        <parameterised_hh type="sigmoid">          <!-- Form of equation: A / (1 + exp(k*(v-d))) -->

                            <parameter name="A" value="1"/>
                            <parameter name="k" value="0.2040816"/>
                            <parameter name="d" value="-56.9"/>
                        </parameterised_hh>
                    </inf>
                </voltage_gate>
            </transition>
        </hh_gate>

        <impl_prefs>
            <table_settings max_v="100" min_v="-100" table_divisions="400"/>
        </impl_prefs>

    </channel_type>
</channelml>
