<?xml version="1.0" encoding="UTF-8"?>
<channelml xmlns="http://morphml.org/channelml/schema"
    xmlns:xsi="http://www.w3.org/2001/XMLSchema-instance"
    xmlns:meta="http://morphml.org/metadata/schema"
    xsi:schemaLocation="http://morphml.org/channelml/schema  ../../Schemata/v1.7.1/Level2/ChannelML_v1.7.1.xsd"
    units="Physiological Units">

    <meta:notes>ChannelML file containing a KCa Channel description from cultured crustacean Stomatogastric Ganglion cells.
        This model was initially described in Turrigiano, G., LeMasson, G., and Marder, E. (1995).
    </meta:notes>

    <channel_type name="KCa">

        <status value="in_progress">
            <meta:contributor>
                <meta:name>Boris Marin</meta:name>
            </meta:contributor>
        </status>

        <meta:authorList>
            <meta:modelAuthor>
                <meta:name>Astrid A. Prinz</meta:name>
            </meta:modelAuthor>
            <meta:modelAuthor>
                <meta:name>Vatsala Thirumalai</meta:name>
            </meta:modelAuthor>
            <meta:modelAuthor>
                <meta:name>Eve Marder</meta:name>
            </meta:modelAuthor>
            <meta:modelTranslator>
                <meta:name>Padraig Gleeson</meta:name>
                <meta:institution>UCL</meta:institution>
            </meta:modelTranslator>
            <meta:modelTranslator>
                <meta:name>Boris Marin</meta:name>
                <meta:email>borismarin -at- gmail.com</meta:email>
            </meta:modelTranslator>
        </meta:authorList>

        <meta:publication>
            <meta:comment> Electrophysiological data comes from this article</meta:comment>
            <meta:fullTitle>Gina Turrigiano, Gwendal LeMasson, and Eve Marder
Selective regulation of current densities underlies spontaneous changes in the activity of cultured neurons
Journal of Neuroscience, 15(5 Pt 1), 3640–52, 1995</meta:fullTitle>
           <meta:pubmedRef>http://www.ncbi.nlm.nih.gov/pubmed/7538565</meta:pubmedRef>
        </meta:publication>

        <meta:publication>
            <meta:comment> Model transcribed from this article</meta:comment>
            <meta:fullTitle>Astrid A. Prinz, Vatsala Thirumalai, and Eve  Marder
The functional consequences of changes in the strength and duration of synaptic inputs to oscillatory neurons
Journal of Neuroscience, 23(3), 943–54, 2003</meta:fullTitle>
            <meta:pubmedRef>http://www.ncbi.nlm.nih.gov/pubmed/12574423</meta:pubmedRef>
        </meta:publication>

        <current_voltage_relation cond_law="ohmic"
                                  ion="k"
                                  charge="1"
                                  default_gmax="5"
                                  default_erev="-80"
                                  fixed_erev="yes">

            <conc_dependence name="Calcium" ion="ca" variable_name="ca_conc" min_conc="1e-12" max_conc="0.1" charge="2"/>

            <gate name="m" instances="4">
                <closed_state id="mc"/>
                <open_state id="m"/>
                <time_course name="tau" from="mc" to="m" expr_form="generic" expr="180.6 - (150.2 / (1 + exp ((v + 46) / (-22.7))))"/>
                <steady_state name="inf" from="mc" to="m" expr_form="generic" expr="(ca_conc/(ca_conc + 3e-3)) * (1/(1+exp((v+28.3) / -12.6)))"/>
            </gate>
        </current_voltage_relation>
    </channel_type>
</channelml>
