<?xml version="1.0" encoding="UTF-8"?>
<channelml xmlns="http://morphml.org/channelml/schema"
           xmlns:xsi="http://www.w3.org/2001/XMLSchema-instance"
           xmlns:meta="http://morphml.org/metadata/schema"
           xsi:schemaLocation="http://morphml.org/channelml/schema  http://www.neuroml.org/NeuroMLValidator/NeuroMLFiles/Schemata/v1.8.1/Level2/ChannelML_v1.8.1.xsd"
           units="Physiological Units">

    <meta:notes>ChannelML file containing a single Channel description</meta:notes>

    <channel_type name="Kd_STG" density="yes">

        <status value="stable">
            <meta:comment>Equations from Alternative to Hand-Tuning Conductance-Based Models: Construction and Analysis of Databases of Model Neurons, Astrid A. Prinz, Cyrus P. Billimoria, and Eve Marder, J Neurophysiol 90: 3998–4015, 2003.</meta:comment>
            <meta:contributor>
                <meta:name>Aditya Gilra</meta:name>
            </meta:contributor>
        </status>

        <meta:notes> Kd conductance </meta:notes>

        <meta:authorList>
            <meta:modelTranslator>
                <meta:name>Aditya Gilra</meta:name>
                <meta:institution>National Centre for Biological Sciences, Bangalore, India.</meta:institution>
                <meta:email>adityag - at - ncbs.res.in</meta:email>
            </meta:modelTranslator>
        </meta:authorList>

        <meta:publication>
            <meta:fullTitle>Alternative to Hand-Tuning Conductance-Based Models: Construction and Analysis of Databases of Model Neurons, Astrid A. Prinz, Cyrus P. Billimoria, and Eve Marder, J Neurophysiol 90: 3998–4015, 2003.</meta:fullTitle>
            <meta:pubmedRef/>
        </meta:publication>

        <meta:neuronDBref>
            <meta:modelName>Kd channel</meta:modelName>
            <meta:uri/>
        </meta:neuronDBref>

        <current_voltage_relation cond_law="ohmic" ion="k" default_erev="-80" default_gmax="125">

            <gate name="n" instances="4">
                <closed_state id="n0"/>
                <open_state id="n"/>
                <time_course name="tau" from="n0" to="n" expr_form="generic" expr="14.4 - 12.8/(1.0 + (exp ((v + 28.3)/(-19.2))))"/>
                <steady_state name="inf" from="n0" to="n" expr_form="sigmoid" rate="1.0" scale="-11.8" midpoint="-12.3"/>
            </gate>

        </current_voltage_relation>

    </channel_type>
</channelml>
