<?xml version="1.0" encoding="UTF-8"?>
<channelml xmlns="http://morphml.org/channelml/schema"
           xmlns:xsi="http://www.w3.org/2001/XMLSchema-instance"
           xmlns:meta="http://morphml.org/metadata/schema"
           xsi:schemaLocation="http://morphml.org/channelml/schema  http://www.neuroml.org/NeuroMLValidator/NeuroMLFiles/Schemata/v1.8.1/Level2/ChannelML_v1.8.1.xsd"
           units="Physiological Units">

    <meta:notes>ChannelML file containing a single Channel description</meta:notes>

    <channel_type name="CaS_STG" density="yes">

        <status value="stable">
            <meta:comment>Equations from Alternative to Hand-Tuning Conductance-Based Models: Construction and Analysis of Databases of Model Neurons, Astrid A. Prinz, Cyrus P. Billimoria, and Eve Marder, J Neurophysiol 90: 3998–4015, 2003.</meta:comment>
            <meta:contributor>
                <meta:name>Aditya Gilra</meta:name>
            </meta:contributor>
        </status>

        <meta:notes> CaS conductance
                     Nernst,Cout=3e-6,z=2
        </meta:notes>

        <meta:authorList>
            <meta:modelAuthor>
                <meta:name>Astrid A. Prinz</meta:name>
            </meta:modelAuthor>
            <meta:modelAuthor>
                <meta:name>Vatsala Thirumalai</meta:name>
            </meta:modelAuthor>
            <meta:modelAuthor>
                <meta:name>Eve Marder</meta:name>
            </meta:modelAuthor>
            <meta:modelTranslator>
                <meta:name>Aditya Gilra</meta:name>
                <meta:institution>National Centre for Biological Sciences, Bangalore, India.</meta:institution>
                <meta:email>adityag - at -- ncbs.res.in</meta:email>
            </meta:modelTranslator>
            <meta:modelTranslator>
                <meta:name>Padraig Gleeson</meta:name>
                <meta:institution>UCL</meta:institution>
            </meta:modelTranslator>
            <meta:modelTranslator>
                <meta:name>Boris Marin</meta:name>
                <meta:email>borismarin -at- gmail.com</meta:email>
            </meta:modelTranslator>
        </meta:authorList>

        <meta:publication>
            <meta:fullTitle>Alternative to Hand-Tuning Conductance-Based Models: Construction and Analysis of Databases of Model Neurons, Astrid A. Prinz, Cyrus P. Billimoria, and Eve Marder, J Neurophysiol 90: 3998–4015, 2003.</meta:fullTitle>
            <meta:pubmedRef/>
        </meta:publication>

        <meta:publication>
            <meta:comment> Electrophysiological data comes from this article</meta:comment>
            <meta:fullTitle>Gina Turrigiano, Gwendal LeMasson, and Eve Marder
Selective regulation of current densities underlies spontaneous changes in the activity of cultured neurons
Journal of Neuroscience, 15(5 Pt 1), 3640–52, 1995</meta:fullTitle>
           <meta:pubmedRef>http://www.ncbi.nlm.nih.gov/pubmed/7538565</meta:pubmedRef>
        </meta:publication>

        <meta:publication>
            <meta:comment> Model transcribed from this article</meta:comment>
            <meta:fullTitle>Astrid A. Prinz, Vatsala Thirumalai, and Eve  Marder
The functional consequences of changes in the strength and duration of synaptic inputs to oscillatory neurons
Journal of Neuroscience, 23(3), 943–54, 2003</meta:fullTitle>
            <meta:pubmedRef>http://www.ncbi.nlm.nih.gov/pubmed/12574423</meta:pubmedRef>
        </meta:publication>

        <meta:neuronDBref>
            <meta:modelName>CaS channel</meta:modelName>
            <meta:uri/>
        </meta:neuronDBref>

        <current_voltage_relation cond_law="ohmic" ion="ca" default_erev="120" default_gmax="10" charge="2" fixed_erev="no">

            <gate name="m" instances="3">
                <closed_state id="m0"/>
                <open_state id="m"/>
                <time_course name="tau" from="m0" to="m" expr_form="generic" expr="2.8+14/((exp ((v + 27)/10)) + (exp ((v + 70)/(-13))))"/>
                <steady_state name="inf" from="m0" to="m" expr_form="sigmoid" rate="1.0" scale="-8.1" midpoint="-33.0"/>
            </gate>

            <gate name="h" instances="1">
                <closed_state id="h0"/>
                <open_state id="h"/>
                <time_course name="tau" from="h0" to="h" expr_form="generic" expr="120+300/( (exp ((v + 55)/9)) + (exp ((v + 65)/(-16))))"/>
                <steady_state name="inf" from="h0" to="h" expr_form="sigmoid" rate="1.0" scale="6.2" midpoint="-60.0"/>
            </gate>

        </current_voltage_relation>

    </channel_type>
</channelml>
