<?xml version="1.0" encoding="iso-8859-1"?>
<neuroml xmlns="http://www.neuroml.org/schema/neuroml2" xmlns:xsi="http://www.w3.org/2001/XMLSchema-instance" xsi:schemaLocation="http://www.neuroml.org/schema/neuroml2 https://raw.github.com/NeuroML/NeuroML2/development/Schemas/NeuroML2/NeuroML_v2beta2.xsd" id="">

    <notes>Ca pool</notes>

    <fixedFactorConcentrationModel id="CaPool_STG" restingConc="5.0e-5mM" decayConstant="0.2s" ion="ca" phi="74.8e6mol_per_m3_per_A_per_s"/>

</neuroml>
