<Lems xmlns="http://www.neuroml.org/lems/0.7.2" xmlns:xsi="http://www.w3.org/2001/XMLSchema-instance" xsi:schemaLocation="http://www.neuroml.org/lems/0.7.2  https://raw.github.com/LEMS/LEMS/development/Schemas/LEMS/LEMS_v0.7.2.xsd">

    <Target component="sim1" reportFile="/home/padraig/neuroConstruct/osb/invertebrate/lobster/PyloricNetwork/neuroConstruct/pythonScripts/../simulations/Sim_335/simulator.props" timesFile="/home/padraig/neuroConstruct/osb/invertebrate/lobster/PyloricNetwork/neuroConstruct/pythonScripts/../simulations/Sim_335/time.dat"/>

        <!--Include standard NeuroML 2 ComponentType definitions-->

    <Include file="Cells.xml"/>
    <Include file="Networks.xml"/>
    <Include file="Simulation.xml"/>

    <Include file="PyNN.xml"/>

        <!--Include the generated NeuroML 2 files-->

        <!--   Channel/synapse files-->
    <Include file="Ach_PD_LP.synapse.nml"/>
    <Include file="Ach_PD_PY.synapse.nml"/>
    <Include file="CaPool_STG.nml"/>
    <Include file="CaS_STG.channel.nml"/>
    <Include file="CaT_STG.channel.nml"/>
    <Include file="Glu_AB_LP.synapse.nml"/>
    <Include file="Glu_AB_PY.synapse.nml"/>
    <Include file="Glu_LP_ABPD.synapse.nml"/>
    <Include file="Glu_LP_PY.synapse.nml"/>
    <Include file="Glu_PY_LP.synapse.nml"/>
    <Include file="H_STG.channel.nml"/>
    <Include file="KA_STG.channel.nml"/>
    <Include file="KCa_STG.channel.nml"/>
    <Include file="Kd_STG.channel.nml"/>
    <Include file="LeakConductance.channel.nml"/>
    <Include file="Na_STG.channel.nml"/>
        <!--   Cell files-->
    <Include file="AB_PD.cell.nml"/>
    <Include file="LP.cell.nml"/>
    <Include file="PY.cell.nml"/>
        <!--   Network file-->
    <Include file="PyloricPacemakerNetwork.net.nml"/>

        <!--Note: this could be: Simulation id="sim1" ... , but Component type="Simulation" ...
        is used to allow validation of this file according to the LEMS schema specified above...-->
    <Component type="Simulation" id="sim1" length="6000.0ms" step="0.005ms" target="network_PyloricPacemakerNetwork">

        <Display id="AB_PD_v" title="PyloricPacemakerNetwork: Default Simulation Configuration, AB_PD, VOLTAGE" xmin="-600.0" xmax="6600.0" ymin="-104.0" ymax="64.0" timeScale="1ms">
            <Line id="VOLTAGE-AB_PD_0" timeScale="1ms" quantity="AB_PD/0/AB_PD/v" scale="1 mV" color="#000000"/>
        </Display>

        <Display id="GraphWin_14" title="PyloricPacemakerNetwork: Default Simulation Configuration, LP, VOLTAGE" xmin="-600.0" xmax="6600.0" ymin="-104.0" ymax="64.0" timeScale="1ms">
            <Line id="VOLTAGE-LP_0" timeScale="1ms" quantity="LP/0/LP/v" scale="1 mV" color="#000000"/>
        </Display>

        <Display id="GraphWin_15" title="PyloricPacemakerNetwork: Default Simulation Configuration, PY, VOLTAGE" xmin="-600.0" xmax="6600.0" ymin="-104.0" ymax="64.0" timeScale="1ms">
            <Line id="VOLTAGE-PY_0" timeScale="1ms" quantity="PY/0/PY/v" scale="1 mV" color="#000000"/>
        </Display>

        <Display id="GraphWin_0" title="PyloricPacemakerNetwork: Default Simulation Configuration, AB_PD, CaPool_STG:CONC:ca, CaPool_STG:CONC:ca, CaPool_STG:CONC:ca" xmin="-600.0" xmax="6600.0" ymin="-3.0000002E-8" ymax="3.3E-7" timeScale="1ms">
            <Line id="CaPool_STG_CONC_ca-AB_PD_0" timeScale="1ms" quantity="AB_PD/0/AB_PD/caConc" scale="1 mol_per_cm3" color="#000000"/>

            <Line id="CaPool_STG_CONC_ca-LP_0" timeScale="1ms" quantity="LP/0/LP/caConc" scale="1 mol_per_cm3" color="#ff0000"/>

            <Line id="CaPool_STG_CONC_ca-PY_0" timeScale="1ms" quantity="PY/0/PY/caConc" scale="1 mol_per_cm3" color="#0000ff"/>
        </Display>

        <OutputFile id="AB_PD_v_OF" fileName="/home/padraig/neuroConstruct/osb/invertebrate/lobster/PyloricNetwork/neuroConstruct/pythonScripts/../simulations/Sim_335/AB_PD_0.dat">
            <OutputColumn id="v" quantity="AB_PD/0/AB_PD/v"/>
        </OutputFile>

        <OutputFile id="LP_v_OF" fileName="/home/padraig/neuroConstruct/osb/invertebrate/lobster/PyloricNetwork/neuroConstruct/pythonScripts/../simulations/Sim_335/LP_0.dat">
            <OutputColumn id="v" quantity="LP/0/LP/v"/>
        </OutputFile>

        <OutputFile id="PY_v_OF" fileName="/home/padraig/neuroConstruct/osb/invertebrate/lobster/PyloricNetwork/neuroConstruct/pythonScripts/../simulations/Sim_335/PY_0.dat">
            <OutputColumn id="v" quantity="PY/0/PY/v"/>
        </OutputFile>

        <OutputFile id="Var_0_OF" fileName="/home/padraig/neuroConstruct/osb/invertebrate/lobster/PyloricNetwork/neuroConstruct/pythonScripts/../simulations/Sim_335/AB_PD_0.CaPool_STG_CONC_ca.dat">
            <OutputColumn id="caConc" quantity="AB_PD/0/AB_PD/caConc"/>
        </OutputFile>

        <OutputFile id="Var_1_OF" fileName="/home/padraig/neuroConstruct/osb/invertebrate/lobster/PyloricNetwork/neuroConstruct/pythonScripts/../simulations/Sim_335/LP_0.CaPool_STG_CONC_ca.dat">
            <OutputColumn id="caConc" quantity="LP/0/LP/caConc"/>
        </OutputFile>

        <OutputFile id="Var_2_OF" fileName="/home/padraig/neuroConstruct/osb/invertebrate/lobster/PyloricNetwork/neuroConstruct/pythonScripts/../simulations/Sim_335/PY_0.CaPool_STG_CONC_ca.dat">
            <OutputColumn id="caConc" quantity="PY/0/PY/caConc"/>
        </OutputFile>
    </Component>

</Lems>
