<?xml version="1.0" encoding="iso-8859-1"?>
<neuroml xmlns="http://www.neuroml.org/schema/neuroml2" xmlns:xsi="http://www.w3.org/2001/XMLSchema-instance" xsi:schemaLocation="http://www.neuroml.org/schema/neuroml2 https://raw.github.com/NeuroML/NeuroML2/development/Schemas/NeuroML2/NeuroML_v2beta2.xsd" id="Na_STG">

    <notes>ChannelML file containing a single Channel description</notes>

    <ionChannel id="Na_STG" conductance="10pS" type="ionChannelHH" species="na">

        <notes>ChannelML file containing a single Channel description</notes>

        <annotation>
            <rdf:RDF xmlns:rdf="http://www.w3.org/1999/02/22-rdf-syntax-ns#">
                <rdf:Description rdf:about="Na_STG">

                    <bqmodel:isDescribedBy xmlns:bqmodel="http://biomodels.net/model-qualifiers/">
                        <rdf:Bag>
                            <rdf:li>Alternative to Hand-Tuning Conductance-Based Models: Construction and Analysis of Databases of Model Neurons, Astrid A. Prinz, Cyrus P. Billimoria, and Eve Marder, J Neurophysiol 90: 3998&#8211;4015, 2003.</rdf:li>
                            <rdf:li rdf:resource=""/>
                        </rdf:Bag>
                    </bqmodel:isDescribedBy>

                    <bqbiol:isVersionOf xmlns:bqbiol="http://biomodels.net/biology-qualifiers/">
                        <rdf:Bag>
                            <rdf:li>Na channel</rdf:li>
                            <rdf:li rdf:resource=""/>
                        </rdf:Bag>
                    </bqbiol:isVersionOf>

                </rdf:Description>
            </rdf:RDF>
        </annotation>

        <gate id="m" type="gateHHtauInf" instances="3">
            <timeCourse type="Na_STG_m_tau_tau"/>
            <steadyState type="HHSigmoidVariable" rate="1.0" scale="5.29mV" midpoint="-25.5mV"/>
        </gate>

        <gate id="h" type="gateHHtauInf" instances="1">
            <timeCourse type="Na_STG_h_tau_tau"/>
            <steadyState type="HHSigmoidVariable" rate="1.0" scale="-5.18mV" midpoint="-48.9mV"/>
        </gate>

    </ionChannel>

    <ComponentType name="Na_STG_m_tau_tau" extends="baseVoltageDepTime">
        <Constant name="TIME_SCALE" dimension="time" value="1 ms"/>
        <Constant name="VOLT_SCALE" dimension="voltage" value="1 mV"/>

        <Dynamics>
            <DerivedVariable name="V" dimension="none" value="v / VOLT_SCALE"/>
            <DerivedVariable name="t" exposure="t" dimension="time" value="(2.64 - 2.52/(1.0 + (exp ((V+120)/(-25))))) * TIME_SCALE"/>
        </Dynamics>

    </ComponentType>

    <ComponentType name="Na_STG_h_tau_tau" extends="baseVoltageDepTime">
        <Constant name="TIME_SCALE" dimension="time" value="1 ms"/>
        <Constant name="VOLT_SCALE" dimension="voltage" value="1 mV"/>

        <Dynamics>
            <DerivedVariable name="V" dimension="none" value="v / VOLT_SCALE"/>
            <DerivedVariable name="t" exposure="t" dimension="time" value="(1.34/(1.0 + (exp ((V + 62.9)/(-10))))*(1.5 + 1.0/(1.0 + (exp ((V+34.9)/3.6))))) * TIME_SCALE"/>
        </Dynamics>

    </ComponentType>

</neuroml>
