<?xml version="1.0" encoding="UTF-8"?>
<channelml xmlns="http://morphml.org/channelml/schema"
           xmlns:xsi="http://www.w3.org/2001/XMLSchema-instance"
           xmlns:meta="http://morphml.org/metadata/schema"
           xsi:schemaLocation="http://morphml.org/channelml/schema  http://www.neuroml.org/NeuroMLValidator/NeuroMLFiles/Schemata/v1.8.1/Level2/ChannelML_v1.8.1.xsd"
           units="Physiological Units">

    <meta:notes>ChannelML file containing a single Channel description</meta:notes>

    <channel_type name="KCa_STG" density="yes">

        <status value="stable">
            <meta:comment>Equations from Alternative to Hand-Tuning Conductance-Based Models: Construction and Analysis of Databases of Model Neurons, Astrid A. Prinz, Cyrus P. Billimoria, and Eve Marder, J Neurophysiol 90: 3998–4015, 2003.</meta:comment>
            <meta:contributor>
                <meta:name>Aditya Gilra</meta:name>
            </meta:contributor>
        </status>

        <meta:notes> KCa conductance </meta:notes>

        <meta:authorList>
            <meta:modelTranslator>
                <meta:name>Aditya Gilra</meta:name>
                <meta:institution>National Centre for Biological Sciences, Bangalore, India.</meta:institution>
                <meta:email>adityag - at -- ncbs.res.in</meta:email>
            </meta:modelTranslator>
        </meta:authorList>

        <meta:publication>
            <meta:fullTitle>Alternative to Hand-Tuning Conductance-Based Models: Construction and Analysis of Databases of Model Neurons, Astrid A. Prinz, Cyrus P. Billimoria, and Eve Marder, J Neurophysiol 90: 3998–4015, 2003.</meta:fullTitle>
            <meta:pubmedRef/>
        </meta:publication>

        <meta:neuronDBref>
            <meta:modelName>KCa channel</meta:modelName>
            <meta:uri/>
        </meta:neuronDBref>

        <current_voltage_relation cond_law="ohmic" ion="k" default_erev="-80" default_gmax="25">

                <!-- kiloMolar physiological units -->

            <conc_dependence name="Calcium" ion="ca" charge="2" variable_name="ca_conc" min_conc="5e-10" max_conc="5e-8"/>

            <gate name="m" instances="4">
                <closed_state id="m0"/>
                <open_state id="m"/>
                    <!-- 3 microMolar in ca_conc/(ca_conc+3e-9) -->

                    <!-- TODO: Remove the need for these dummy alpha & beta!!! Update definition of voltConcDependenceSimple in ChannelML_v1.8.1_GENESIStab.xsl
                <transition name="alpha" from="m0" to="m" expr_form="generic" expr="v" />  Not actually used below...
                <transition name="beta" from="m" to="m0" expr_form="generic" expr="v" /> Not actually used below...-->
                <time_course name="tau" from="m0" to="m" expr_form="generic" expr="180.6 - 150.2/(1.0 + (exp ((v + 46.0)/(-22.7))))"/>
                <steady_state name="inf" from="m0" to="m" expr_form="generic" expr="(ca_conc/(ca_conc + 3e-9)) * 1.0/(1.0 + (exp ((v + 28.3)/(-12.6))))"/>
            </gate>

        </current_voltage_relation>

        <impl_prefs>
          <comment>Setting these table divs for direct comparison with original GENESIS scripts</comment>
          <table_settings max_v="100" min_v="-100" table_divisions="399"/>
        </impl_prefs>

    </channel_type>
</channelml>
