<?xml version="1.0" encoding="UTF-8"?>
<channelml xmlns="http://morphml.org/channelml/schema"
    xmlns:xsi="http://www.w3.org/2001/XMLSchema-instance"
    xmlns:meta="http://morphml.org/metadata/schema"
    xsi:schemaLocation="http://morphml.org/channelml/schema  ../../../../NeuroMLValidator/web/NeuroMLFiles/Schemata/v1.8.0/Level2/ChannelML_v1.8.0.xsd"
    units="Physiological Units">
    <meta:notes>ChannelML file containing the leakage conductance description from cultured crustacean Stomatogastric Ganglion cells.
        This model was initially described in Turrigiano, G., LeMasson, G., and Marder, E. (1995).
    </meta:notes>

    <channel_type name="LeakConductance" density="yes">

        <status value="in_progress">
            <meta:contributor>
                <meta:name>Boris Marin</meta:name>
            </meta:contributor>
        </status>

        <meta:authorList>
            <meta:modelAuthor>
                <meta:name>Astrid A. Prinz</meta:name>
            </meta:modelAuthor>
            <meta:modelAuthor>
                <meta:name>Vatsala Thirumalai</meta:name>
            </meta:modelAuthor>
            <meta:modelAuthor>
                <meta:name>Eve Marder</meta:name>
            </meta:modelAuthor>
            <meta:modelTranslator>
                <meta:name>Padraig Gleeson</meta:name>
                <meta:institution>UCL</meta:institution>
            </meta:modelTranslator>
            <meta:modelTranslator>
                <meta:name>Boris Marin</meta:name>
                <meta:email>borismarin -at- gmail.com</meta:email>
            </meta:modelTranslator>
        </meta:authorList>

        <meta:publication>
            <meta:comment> Electrophysiological data comes from this article</meta:comment>
            <meta:fullTitle>Gina Turrigiano, Gwendal LeMasson, and Eve Marder
Selective regulation of current densities underlies spontaneous changes in the activity of cultured neurons
Journal of Neuroscience, 15(5 Pt 1), 3640–52, 1995</meta:fullTitle>
           <meta:pubmedRef>http://www.ncbi.nlm.nih.gov/pubmed/7538565</meta:pubmedRef>
        </meta:publication>

        <meta:publication>
            <meta:comment> Model transcribed from this article</meta:comment>
            <meta:fullTitle>Astrid A. Prinz, Vatsala Thirumalai, and Eve  Marder
The functional consequences of changes in the strength and duration of synaptic inputs to oscillatory neurons
Journal of Neuroscience, 23(3), 943–54, 2003</meta:fullTitle>
            <meta:pubmedRef>http://www.ncbi.nlm.nih.gov/pubmed/12574423</meta:pubmedRef>
        </meta:publication>

        <current_voltage_relation cond_law="ohmic" ion="non_specific" default_gmax="0.01" default_erev="-55"/>

    </channel_type>
</channelml>
